// SBML level 3 version 2

model Model_1()
  // Rodriguez-Caso2006_Polyamine_Metabolism
  // biomodels.db:MODEL6812345601 biomodels.db:BIOMD0000000190
  // isDescribedBy pubmed:16709566
  // hasTaxon taxonomy:40674 taxonomy:9989
  // isVersionOf GO:0006595
  // hasProperty mamo:MAMO_0000046
  // model units - substance: substance, time: time_unit

  // Compartments:
  compartment cytosol = 1; cytosol is "Cytosol";

  // Species:
  species SAM in cytosol = 0.01; SAM is "S-adenosyl-L-methionine";  // CHEBI:15414 kegg.compound:C00019
  species A in cytosol = 0.01; A is "S-adenosylmethioninamine";  // CHEBI:15625 kegg.compound:C01137
  species P in cytosol = 0.01; P is "Putrescine";
  species S in cytosol = 0.01; S is "Spermine";
  species D in cytosol = 0.01; D is "Spermidine";
  species aS in cytosol = 0.01; aS is "N1-Acetylspermine";
  species aD in cytosol = 0.01; aD is "N1-Acetylspermidine";
  species $Met in cytosol = 50; Met is "Methionine";
  species $ORN in cytosol = 300; ORN is "L-Ornithine";
  species $AcCoA in cytosol = 39.5; AcCoA is "Acetyl-CoA";
  species $CoA in cytosol = 160;

  // Parameters:
  Kaccoa has min_1;
  R = 0.004 min_1;
  Kcoa has min_1;
  Vmaxodc = 1.279057 uM_min_1;
  Ksodc = 5 uM_min_2; Ksodc is "KsODC";
  Keq = 1 uM_1;
  Kdodc = 0.05 uM_1; Kdodc is "KdODC";
  Antz = 0.5745895 uM_min_1;
  Ksantz = 0.02 uM_min_2; Ksantz is "KsANTZ";
  Kdantz = 0.02 min_1; Kdantz is "KdANTZ";
  Vmaxssat = 0.6772985 uM_min_1;
  Ksssat = 0.001 uM_min_2; Ksssat is "KsSSAT";
  Kdssat = 0.2 min_1; Kdssat is "KdSSAT";
  Vmaxsamdc = 0.3674659 uM_min_1;
  Kssamdc = 1 uM_min_2; Kssamdc is "KsSAMDC";
  Kdsamdc = 0.02 min_1; Kdsamdc is "KdSAMDC";
  ODC_Kmodc = 60 uM;
  ODC_Kipodc = 1300 uM;
  SAMdc_Kissamdc = 500 uM;
  SAMdc_Kmsamdc = 50 uM;
  SAMdc_Kapsamdc = 0.5 uM;
  SAMdc_Kiasamdc = 2.5 uM;
  C = 4.44 dimensionless;
  SSAT_for_S_Kmsssat = 35 uM;
  SSAT_for_S_Kmdssat = 130 uM;
  SSAT_for_S_Kmaccoassat = 1.5 uM;
  SSAT_for_S_Kmcoassat = 40 uM;
  SSAT_for_D_Kmdssat = 130 uM;
  SSAT_for_D_Kmsssat = 35 uM;
  SSAT_for_D_Kmaccoassat = 1.5 uM;
  SSAT_for_D_Kmcoassat = 40 uM;
  PAO_for_aD_Vmpao = 10.35 uM_min_1;
  PAO_for_aD_Kmadpao = 14 uM;
  PAO_for_aD_Kmaspao = 0.6 uM;
  PAO_for_aD_Kmdpao = 50 uM;
  PAO_for_aD_Kmspao = 15 uM;
  PAO_for_aS_Vmpao = 10.35 uM_min_1;
  PAO_for_aS_Kmaspao = 0.6 uM;
  PAO_for_aS_Kmadpao = 14 uM;
  PAO_for_aS_Kmdpao = 50 uM;
  PAO_for_aS_Kmspao = 15 uM;
  SpdS_Vmspds = 10.95 uM_min_1;
  SpdS_Kiaspds = 0.8 uM;
  SpdS_Kpspds = 40 uM;
  SpdS_Kidspds = 100 uM;
  SpdS_KaSpds = 0.3 uM;
  SpmS_Vmspms = 3.23 uM_min_1;
  SpmS_Kiaspms = 0.06 uM;
  SpmS_Kdspms = 60 uM;
  SpmS_Kisspms = 25 uM;
  SpmS_Kaspms = 0.1 uM;
  MAT_Vmmat = 0.45 uM_min_1;
  MAT_Kmmat = 41 uM;
  MAT_Kimetmat = 50 uM;
  P_efflux_Kpefflux = 0.01 min_1;
  aD_efflux_Kadefflux = 0.01 min_1;

  // Assignment rules:
  Kaccoa := R;
  Kcoa := 3*R;

  // Rate rules:
  Vmaxodc' = Ksodc/(1 + Keq*(D + S)) - Kdodc*Antz*Vmaxodc;
  Antz' = Ksantz*(1 - 1/(1 + Keq*0.01*(D + S))) - Kdantz*Antz;
  Vmaxssat' = Ksssat*(1 - 1/(1 + Keq*(D + S))) - Kdssat*(1/(1 + Keq*(D + S)))*Vmaxssat;
  Vmaxsamdc' = Kssamdc*(1/(1 + Keq*(D + S))) - Kdsamdc*Vmaxsamdc;

  // Reactions:
  ODC: $ORN => P; cytosol*(Vmaxodc*ORN/(ODC_Kmodc*(1 + P/ODC_Kipodc) + ORN)); ODC is "Ornithine decarboxylase";
  SAMdc: SAM => A; cytosol*(Vmaxsamdc/(1 + S/SAMdc_Kissamdc)*SAM/(SAMdc_Kmsamdc*(1 + SAMdc_Kapsamdc/P + A/SAMdc_Kiasamdc) + SAM)); SAMdc is "S-adenosylmethionine decarboxylase";  // modifiers: P, S
  SSAT_for_S: S + $AcCoA => aS + $CoA; cytosol*(1/C*Vmaxssat*S*AcCoA/(SSAT_for_S_Kmsssat*(1 + D/SSAT_for_S_Kmdssat)*SSAT_for_S_Kmaccoassat*(1 + CoA/SSAT_for_S_Kmcoassat) + SSAT_for_S_Kmaccoassat*(1 + CoA/SSAT_for_S_Kmcoassat)*S + SSAT_for_S_Kmsssat*(1 + D/SSAT_for_S_Kmdssat)*AcCoA + S*AcCoA)); SSAT_for_S is "Spermidine/Spermine N1-acetyltransferase for S";  // modifiers: D
  SSAT_for_D: D + $AcCoA => aD + $CoA; cytosol*(Vmaxssat*D*AcCoA/(SSAT_for_D_Kmdssat*(1 + S/SSAT_for_D_Kmsssat)*SSAT_for_D_Kmaccoassat*(1 + CoA/SSAT_for_D_Kmcoassat) + SSAT_for_D_Kmaccoassat*(1 + CoA/SSAT_for_D_Kmcoassat)*D + SSAT_for_D_Kmdssat*(1 + S/SSAT_for_D_Kmsssat)*AcCoA + D*AcCoA)); SSAT_for_D is "Spermidine/spermine N1-acetyltransferase for D";  // modifiers: S
  PAO_for_aD: aD => P; cytosol*(PAO_for_aD_Vmpao*aD/(PAO_for_aD_Kmadpao*(1 + aD/PAO_for_aD_Kmadpao + aS/PAO_for_aD_Kmaspao + D/PAO_for_aD_Kmdpao + S/PAO_for_aD_Kmspao))); PAO_for_aD is "Polyamine oxidase for aD";  // modifiers: S, D, aS
  PAO_for_aS: aS => D; cytosol*(PAO_for_aS_Vmpao*aS/(PAO_for_aS_Kmaspao*(1 + aD/PAO_for_aS_Kmadpao + aS/PAO_for_aS_Kmaspao + D/PAO_for_aS_Kmdpao + S/PAO_for_aS_Kmspao))); PAO_for_aS is "Polyamine oxidase for aS";  // modifiers: S, aD
  SpdS: A + P => D; cytosol*(SpdS_Vmspds*A*P/(SpdS_Kiaspds*SpdS_Kpspds*(1 + D/SpdS_Kidspds) + SpdS_Kpspds*A + SpdS_KaSpds*(1 + D/SpdS_Kidspds)*P + A*P)); SpdS is "Spermidine synthase";
  SpmS: A + D => S; cytosol*(SpmS_Vmspms*A*D/(SpmS_Kiaspms*SpmS_Kdspms*(1 + S/SpmS_Kisspms) + SpmS_Kdspms*A + SpmS_Kaspms*(1 + S/SpmS_Kisspms)*D + A*D)); SpmS is "Spermine synthase";
  MAT: $Met => SAM; cytosol*(MAT_Vmmat/(1 + MAT_Kmmat/Met*(1 + SAM/MAT_Kimetmat))); MAT is "Methionine adenosyltransferase";
  VCoA: $AcCoA => $CoA; cytosol*Kcoa*AcCoA; VCoA is "VCOA";
  VacCoA: $CoA => $AcCoA; cytosol*Kaccoa*CoA; VacCoA is "VACCOA";
  P_efflux: P => ; cytosol*P_efflux_Kpefflux*P; P_efflux is "Putrescine efflux";
  aD_efflux: aD => ; cytosol*aD_efflux_Kadefflux*aD;

  // Unit definitions:
  unit min_1 = 1 / (60 second); min_1 is "permin";
  unit uM_min_1 = 1e-6 mole / (60 second * litre); uM_min_1 is "uMpermin";
  unit uM_min_2 = 1e-6 mole / (litre * (60 second)^2); uM_min_2 is "uM(min)^-2";
  unit uM_1 = litre / (1e-6 mole); uM_1 is "peruM";
  unit uM = 1e-6 mole / litre; uM is "microM";
  unit time_unit = 60 second; time_unit is "minute";
  unit substance = 1e-6 mole; substance is "µmole";
  unit uM_1_min_1 = litre / (1e-6 mole * 60 second); uM_1_min_1 is "peruMpermin";
  unit uM_1_min_2 = litre / (1e-6 mole * (60 second)^2); uM_1_min_2 is "uM^(-1)min^(-2)";
  unit min_uM_1 = 60 second * litre / (1e-6 mole); min_uM_1 is "minperuM";
end
